! ====================================================================
! CENARIO C: BESS CENTRALIZADO NA SUBESTACAO SANTOS 1 (1.5 MW / 3.0 MWh)
! MODELO NATIVO STORAGE OPENDSS COM CONTROLE FISICO DE SOC E LIMITES
! ====================================================================
Redirect "Cenario_B_Expansao_FV_VE.dss"

! Curva horária de despacho normalizada (24 horas, intervalo 1h)
! Valores multiplicados por kWrated (1.500 kW):
! Valores negativos = Carga / Recarga (absorvendo da rede)
! Valores positivos = Descarga / Peak Shaving (injetando na rede)
! Carga noturna: 02h-05h @ 450 kW (mult = -450/1500 = -0.30) -> 1.800 kWh AC
! Recarga solar: 12h @ 250 kW (mult = -0.166667) e 13h @ 160.53 kW (mult = -0.107020) -> 410.53 kWh AC
! Descarga no pico: 19h @ 700 kW (mult = 0.466667), 20h @ 950 kW (mult = 0.633333), 21h @ 550 kW (mult = 0.366667) -> 2.200 kWh AC
! Total carregado: 2.210,53 kWh AC -> 2.100,00 kWh quimicos (SOC: 20% -> 90%)
! Total descarregado: 2.200,00 kWh AC <- 2.315,79 kWh quimicos (SOC: 90% -> 12,81%)
New Loadshape.BESS_SE_Shape npts=24 interval=1 mult=[0.0 -0.30 -0.30 -0.30 -0.30 0.0 0.0 0.0 0.0 0.0 0.0 -0.166667 -0.107020 0.0 0.0 0.0 0.0 0.0 0.466667 0.633333 0.366667 0.0 0.0 0.0]

! Elemento Storage nativo do OpenDSS
New Storage.BESS_SE phases=3 bus1=MT_STO33_346.1.2.3 kv=13.8 kWrated=1500 kVA=1500 kWhrated=3000 %stored=20 %reserve=10 %EffCharge=95 %EffDischarge=95 %IdlingkW=0 DispMode=Follow daily=BESS_SE_Shape

! Monitores para telemetria de potencias e estado interno
New Monitor.Mon_BESS_SE_P element=Storage.BESS_SE terminal=1 mode=1
New Monitor.Mon_BESS_SE_State element=Storage.BESS_SE terminal=1 mode=3
