! ====================================================================
! BANCOS DE CAPACITORES MT — STO33 (FONTE: UNCRMT)
! ====================================================================
New Capacitor.CAP_111450770 phases=3 bus1=MT_STO33_333391.1.2.3 kv=13.8 kvar=300.0
New Capacitor.CAP_111455064 phases=3 bus1=MT_STO33_331666.1.2.3 kv=13.8 kvar=300.0
