! ====================================================================
! MASTER OPENDSS — ALIMENTADOR STO33 (CPFL PIRATININGA / SANTOS-SP)
! RECONSTRUCAO ELETRICA COMPLETA A PARTIR DA BDGD REGULATORIA ANEEL
! ====================================================================

Redirect Circuit.dss
Redirect LineCodes.dss
Redirect Lines.dss
Redirect Transformers.dss
Redirect LoadShapes.dss
Redirect Loads.dss
Redirect PVSystems.dss
Redirect Capacitors.dss

! Definicao das bases de tensao
Set VoltageBases=[13.8, 0.22]
CalcVoltageBases

! Medidores e Monitores de Telemetria
New EnergyMeter.MedidorSE element=Line.L_42991583 terminal=1
New Monitor.Mon_Subestacao element=Line.L_42991583 terminal=1 mode=0
New Monitor.Mon_TrafoCritico element=Transformer.TR_1193581 terminal=1 mode=0

! Modo Snapshot (Fluxo de Carga Estatico)
Set Mode=Snapshot
Solve

! Fim do Master
